/Users/timb/project/metrum-mifuns/inst/mi210/script/../nonmem/1002.lock/1002.lst
2010.03.03.2051.54
$PROB 1002 phase1 2 CMT
$INPUT C ID TIME SEQ=DROP EVID AMT DV
$DATA ../../data/derived/phase1.csv IGNORE=C
$SUBROUTINE ADVAN4 TRANS4
$PK
 CL=THETA(1)*EXP(ETA(1))
 V2 =THETA(2)*EXP(ETA(2))
 KA=THETA(3)*EXP(ETA(3))
 Q  =THETA(4)*EXP(ETA(4))
 V3=THETA(5) *EXP(ETA(5))
 S2=V2

$ERROR
 Y=F*EXP(ERR(1)) + ERR(2)
 IPRE=F

$THETA
(10)     ;CL
(10)      ;V
(0.2)     ;KA
(10)      ;Q
(10)      ;V3

$OMEGA 0.09 0.09 0.09 0.09 0.09
$SIGMA 0.09 0.1
$ESTIMATION MAXEVAL=9999 PRINT=5 NOABORT METHOD=1 INTER MSFO=./1002.msf
$COV PRINT=E
$TABLE NOPRINT FILE=./1002.tab ONEHEADER ID AMT TIME EVID PRED IPRE CWRES
$TABLE NOPRINT FILE=./1002par.tab ONEHEADER ID TIME CL Q V2 V3 KA ETA1 ETA2 ETA3 ETA4 ETA5

1NONLINEAR MIXED EFFECTS MODEL PROGRAM (NONMEM) VERSION 7.1.0
 ORIGINALLY DEVELOPED BY STUART BEAL, LEWIS SHEINER, AND ALISON BOECKMANN
 CURRENT DEVELOPERS ARE ROBERT BAUER, ICON DEVELOPMENT SOLUTIONS,
 AND ALISON BOECKMANN. IMPLEMENTATION, EFFICIENCY, AND STANDARDIZATION
 PERFORMED BY NOUS INFOSYSTEMS.
 PROBLEM NO.:         1
 1002 phase1 2 CMT
 TOT. NO. OF OBS RECS:      260
 TOT. NO. OF INDIVIDUALS:     20
 TWO COMPARTMENT MODEL WITH FIRST-ORDER ABSORPTION (ADVAN4)
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 #METH: First Order Conditional Estimation with Interaction
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 Elapsed estimation time in seconds:     4.55

 #TERM:
0MINIMIZATION SUCCESSFUL
 NO. OF FUNCTION EVALUATIONS USED:      542
 NO. OF SIG. DIGITS IN FINAL EST.:  3.5
0PARAMETER ESTIMATE IS NEAR ITS BOUNDARY
 THIS MUST BE ADDRESSED BEFORE THE COVARIANCE STEP CAN BE IMPLEMENTED

 ETABAR IS THE ARITHMETIC MEAN OF THE ETA-ESTIMATES,
 AND THE P-VALUE IS GIVEN FOR THE NULL HYPOTHESIS THAT THE TRUE MEAN IS 0.

 ETABAR:        -2.0946E-03 -1.5156E-03  1.6850E-03 -8.6651E-07 -5.5744E-07
 SE:             4.2040E-02  2.4582E-02  3.2263E-02  2.5034E-06  1.8094E-06

 P VAL.:         9.6026E-01  9.5084E-01  9.5835E-01  7.2924E-01  7.5802E-01

 ETAshrink(%):   1.4173E+01  4.1889E+01  2.1787E+01  9.9617E+01  9.9723E+01
 EPSshrink(%):   2.6611E+01  2.6611E+01


 #TERE:

 ********************               FIRST ORDER CONDITIONAL ESTIMATION WITH INTERACTION              ********************
 #OBJT:**************                       MINIMUM VALUE OF OBJECTIVE FUNCTION                      ********************
 #OBJV:********************************************    -2246.617       **************************************************

 ********************               FIRST ORDER CONDITIONAL ESTIMATION WITH INTERACTION              ********************
 ********************                             FINAL PARAMETER ESTIMATE                           ********************

 THETA - VECTOR OF FIXED EFFECTS PARAMETERS   *********
         TH 1      TH 2      TH 3      TH 4      TH 5
         1.28E+01  2.32E+01  1.12E-01  6.07E+00  7.45E+01

 OMEGA - COV MATRIX FOR RANDOM EFFECTS - ETAS  ********
            ETA1      ETA2      ETA3      ETA4      ETA5
 ETA1
+        5.05E-02
 ETA2
+        0.00E+00  3.77E-02
 ETA3
+        0.00E+00  0.00E+00  3.58E-02
 ETA4
+        0.00E+00  0.00E+00  0.00E+00  9.00E-06
 ETA5
+        0.00E+00  0.00E+00  0.00E+00  0.00E+00  9.00E-06

 SIGMA - COV MATRIX FOR RANDOM EFFECTS - EPSILONS  ****
            EPS1      EPS2
 EPS1
+        3.42E-02
 EPS2
+        0.00E+00  1.00E-05
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<attribution>Altered on installation by NMQual (copyright metruminstitute.org)</attribution>
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