/Users/timb/project/metrum-mifuns/inst/mi210/script/../nonmem/1004.lock/1004.lst
2010.03.03.2058.22
$PROB 1004 phase1 2 CMT like 1003 but better bounds
$INPUT C ID TIME SEQ=DROP EVID AMT DV
$DATA ../../data/derived/phase1.csv IGNORE=C
$SUBROUTINE ADVAN4 TRANS4
$PK
 CL=THETA(1)*EXP(ETA(1))
 V2 =THETA(2)*EXP(ETA(2))
 KA=THETA(3)*EXP(ETA(3))
 Q  =THETA(4);*EXP(ETA(4))
 V3=THETA(5); *EXP(ETA(5))
 S2=V2

$ERROR
 Y=F*EXP(ERR(1)); + ERR(2)
 IPRE=F

$THETA
(0,10,50)     ;CL
(0,10,100)      ;V
(0,0.2, 5)     ;KA
(0,10,50)      ;Q
(0,10,1000)      ;V3

$OMEGA 0.09 0.09 0.09 ;0.09 0.09
$SIGMA 0.09 ;0.1
$ESTIMATION MAXEVAL=9999 PRINT=5 NOABORT METHOD=1 INTER MSFO=./1004.msf
$COV PRINT=E
$TABLE NOPRINT FILE=./1004.tab ONEHEADER ID AMT TIME EVID PRED IPRE CWRES
$TABLE NOPRINT FILE=./1004par.tab ONEHEADER ID TIME CL Q V2 V3 KA ETA1 ETA2 ETA3

1NONLINEAR MIXED EFFECTS MODEL PROGRAM (NONMEM) VERSION 7.1.0
 ORIGINALLY DEVELOPED BY STUART BEAL, LEWIS SHEINER, AND ALISON BOECKMANN
 CURRENT DEVELOPERS ARE ROBERT BAUER, ICON DEVELOPMENT SOLUTIONS,
 AND ALISON BOECKMANN. IMPLEMENTATION, EFFICIENCY, AND STANDARDIZATION
 PERFORMED BY NOUS INFOSYSTEMS.
 PROBLEM NO.:         1
 1004 phase1 2 CMT like 1003 but better bounds
 TOT. NO. OF OBS RECS:      260
 TOT. NO. OF INDIVIDUALS:     20
 TWO COMPARTMENT MODEL WITH FIRST-ORDER ABSORPTION (ADVAN4)
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 #METH: First Order Conditional Estimation with Interaction
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 Elapsed estimation time in seconds:     2.75

 #TERM:
0MINIMIZATION SUCCESSFUL
 NO. OF FUNCTION EVALUATIONS USED:      345
 NO. OF SIG. DIGITS IN FINAL EST.:  3.5
0PARAMETER ESTIMATE IS NEAR ITS BOUNDARY
 THIS MUST BE ADDRESSED BEFORE THE COVARIANCE STEP CAN BE IMPLEMENTED

 ETABAR IS THE ARITHMETIC MEAN OF THE ETA-ESTIMATES,
 AND THE P-VALUE IS GIVEN FOR THE NULL HYPOTHESIS THAT THE TRUE MEAN IS 0.

 ETABAR:        -7.2875E-04  4.0452E-03  1.9594E-03
 SE:             4.9318E-02  3.7506E-02  2.7705E-02

 P VAL.:         9.8821E-01  9.1411E-01  9.4362E-01

 ETAshrink(%):   1.2887E+00  2.0931E+01  4.2761E+00
 EPSshrink(%):   8.8285E+00


 #TERE:

 ********************               FIRST ORDER CONDITIONAL ESTIMATION WITH INTERACTION              ********************
 #OBJT:**************                       MINIMUM VALUE OF OBJECTIVE FUNCTION                      ********************
 #OBJV:********************************************    -2476.191       **************************************************

 ********************               FIRST ORDER CONDITIONAL ESTIMATION WITH INTERACTION              ********************
 ********************                             FINAL PARAMETER ESTIMATE                           ********************

 THETA - VECTOR OF FIXED EFFECTS PARAMETERS   *********
         TH 1      TH 2      TH 3      TH 4      TH 5
         1.25E+01  1.11E+01  5.95E-02  4.96E+01  1.00E-01

 OMEGA - COV MATRIX FOR RANDOM EFFECTS - ETAS  ********
            ETA1      ETA2      ETA3
 ETA1
+        5.26E-02
 ETA2
+        0.00E+00  4.74E-02
 ETA3
+        0.00E+00  0.00E+00  1.76E-02

 SIGMA - COV MATRIX FOR RANDOM EFFECTS - EPSILONS  ****
            EPS1
 EPS1
+        4.63E-02
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<attribution>Altered on installation by NMQual (copyright metruminstitute.org)</attribution>
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