/Users/timb/project/metrum-mifuns/inst/test/nm6/script/../out/1005.lock/1005.lst
2010.01.18.1819.00
$PROB RUN# 1005 ESTIMATE PK W/COVARIATE RELATIONSHIPS
$INPUT C ID DV AMT II ADDL TIME RATE HT WT CLCR SEX AGE
$DATA  ../../data/1005.csv IGNORE=C
$SUB ADVAN1 TRANS2 INFN=../../infn/MIfunsRunlogNM6.for
$ABB COMRES=4
$PK
TVCL=THETA(1)
CL=TVCL*EXP(ETA(1))
TVV=THETA(2)
V=TVV*EXP(ETA(2))
S1=V
$ERROR
Y=F + F*ERR(1) +ERR(2)
IPRED=F
"  LAST
"  COM(1)=G(1,1)
"  COM(2)=G(2,1)
"  COM(3)=HH(1,1)
"  COM(4)=HH(2,1)
$THETA
 (0, 13) ;1. CL
 (0, 75);2. V
$OMEGA BLOCK(2)
(0.04) ;1. CL VAR
(0.02) (0.04) ;2. V VAR
$SIGMA
0.04
1
;$MSFI=./1005.msf
$ESTIMATION MAXEVAL=9999 PRINT=10 POSTHOC MSFO=./1005.msf
$TABLE ID TIME EVID IPRED NOPRINT ONEHEADER FILE=./1005.tab
$TABLE ID CL V EVID ETA1 ETA2 NOPRINT
 ONEHEADER FILE=./1005par.tab
$TABLE ID TIME COM(1)=G11 COM(2)=G21 COM(3)=H11
COM(4)=H21 IPRED MDV NOPRINT ONEHEADER FILE=./cwtab1.deriv

1NONLINEAR MIXED EFFECTS MODEL PROGRAM (NONMEM)    DOUBLE PRECISION NONMEM    VERSION VI LEVEL 2.0
 DEVELOPED AND PROGRAMMED BY STUART BEAL AND LEWIS SHEINER
 PROBLEM NO.:         1
 RUN# 1005 ESTIMATE PK W/COVARIATE RELATIONSHIPS
 TOT. NO. OF OBS RECS:      560
 TOT. NO. OF INDIVIDUALS:     40
 ONE COMPARTMENT MODEL (ADVAN1)
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
0MINIMIZATION SUCCESSFUL
 NO. OF FUNCTION EVALUATIONS USED:      171
 NO. OF SIG. DIGITS IN FINAL EST.:  3.2

 ********************                           MINIMUM VALUE OF OBJECTIVE FUNCTION                  ********************

 **************************************************        549.245     **************************************************

 ********************                                  FINAL PARAMETER ESTIMATE                      ********************

 THETA - VECTOR OF FIXED EFFECTS PARAMETERS   *********
            TH 1      TH 2
         1.11E+01  9.65E+01

 OMEGA - COV MATRIX FOR RANDOM EFFECTS - ETAS  ********
            ETA1      ETA2
 ETA1
+        6.05E-02
 ETA2
+        2.32E-02  5.18E-02

 SIGMA - COV MATRIX FOR RANDOM EFFECTS - EPSILONS  ****
            EPS1      EPS2
 EPS1
+        4.34E-02
 EPS2
+        0.00E+00  5.06E-03
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C     Altered on installation by NMQual (copyright metruminstitute.org): 2009.11.19.0831
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<attribution>Altered on installation by NMQual (copyright metruminstitute.org)</attribution>
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