/Users/timb/project/metrum-mifuns/inst/test/nm7/script/../out/1003.lock/1003.lst
2010.01.19.2136.16
$PROB RUN# 1003 ESTIMATE PK W/COVARIATE RELATIONSHIPS
$INPUT C ID DV AMT II ADDL TIME RATE HT WT CLCR SEX AGE
$DATA  ../../data/1003.csv IGNORE=C
$SUB ADVAN1 TRANS2
$PK
TVCL=THETA(1)
CL=TVCL*EXP(ETA(1))
TVV=THETA(2)
V=TVV*EXP(ETA(2))
S1=V
$ERROR
Y=F + F*ERR(1) +ERR(2)
IPRED=F
$THETA
 (0, 13) ;1. CL
 (0, 75);2. V
$OMEGA BLOCK(2)
(0.04) ;1. CL VAR
(0.02) (0.04) ;2. V VAR
$SIGMA
0.04
1
;$MSFI=./1003.msf
$ESTIMATION MAXEVAL=9999 PRINT=10 POSTHOC MSFO=./1003.msf
$TABLE ID TIME EVID IPRED CWRES NOPRINT ONEHEADER FILE=./1003.tab
$TABLE ID CL V EVID ETA1 ETA2 NOPRINT ONEHEADER FILE=./1003par.tab

1NONLINEAR MIXED EFFECTS MODEL PROGRAM (NONMEM) VERSION 7.1.0
 ORIGINALLY DEVELOPED BY STUART BEAL, LEWIS SHEINER, AND ALISON BOECKMANN
 CURRENT DEVELOPERS ARE ROBERT BAUER, ICON DEVELOPMENT SOLUTIONS,
 AND ALISON BOECKMANN. IMPLEMENTATION, EFFICIENCY, AND STANDARDIZATION
 PERFORMED BY NOUS INFOSYSTEMS.
 PROBLEM NO.:         1
 RUN# 1003 ESTIMATE PK W/COVARIATE RELATIONSHIPS
 TOT. NO. OF OBS RECS:      560
 TOT. NO. OF INDIVIDUALS:     40
 ONE COMPARTMENT MODEL (ADVAN1)
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 #METH: First Order
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 Elapsed estimation time in seconds:     0.41

 #TERM:
0MINIMIZATION SUCCESSFUL
 NO. OF FUNCTION EVALUATIONS USED:      198
 NO. OF SIG. DIGITS IN FINAL EST.:  4.3

 #TERE:

 ********************                                   FIRST ORDER                                  ********************
 #OBJT:**************                       MINIMUM VALUE OF OBJECTIVE FUNCTION                      ********************
 #OBJV:********************************************      527.614       **************************************************

 ********************                                   FIRST ORDER                                  ********************
 ********************                             FINAL PARAMETER ESTIMATE                           ********************

 THETA - VECTOR OF FIXED EFFECTS PARAMETERS   *********
         TH 1      TH 2
         1.14E+01  9.35E+01

 OMEGA - COV MATRIX FOR RANDOM EFFECTS - ETAS  ********
            ETA1      ETA2
 ETA1
+        5.98E-02
 ETA2
+       -3.31E-03  3.01E-02

 SIGMA - COV MATRIX FOR RANDOM EFFECTS - EPSILONS  ****
            EPS1      EPS2
 EPS1
+        4.23E-02
 EPS2
+        0.00E+00  1.81E-02
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<attribution>Altered on installation by NMQual (copyright metruminstitute.org)</attribution>
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