/Users/timb/project/metrum-mifuns/inst/mi210/script/../nonmem/1001.lock/1001.lst
2010.03.03.2049.46
$PROB 1001 phase1 1CMT
$INPUT C ID TIME SEQ=DROP EVID AMT DV
$DATA ../../data/derived/phase1.csv IGNORE=C
$SUBROUTINE ADVAN2 TRANS2
$PK
 CL=THETA(1)*EXP(ETA(1))
 V =THETA(2)*EXP(ETA(2))
 KA=THETA(3)*EXP(ETA(3))
 S2=V

$ERROR
 Y=F*EXP(ERR(1)) + ERR(2)
 IPRE=F

$THETA
(10)     ;CL
(10)      ;V
(0.2)     ;KA

$OMEGA 0.09 0.09 0.09
$SIGMA 0.09 0.1
$ESTIMATION MAXEVAL=9999 PRINT=5 NOABORT METHOD=1 INTER MSFO=./1001.msf
$COV PRINT=E
$TABLE NOPRINT FILE=./1001.tab ONEHEADER ID AMT TIME EVID PRED IPRE CWRES
$TABLE NOPRINT FILE=./1001par.tab ONEHEADER ID TIME CL V KA ETA1 ETA2 ETA3

1NONLINEAR MIXED EFFECTS MODEL PROGRAM (NONMEM) VERSION 7.1.0
 ORIGINALLY DEVELOPED BY STUART BEAL, LEWIS SHEINER, AND ALISON BOECKMANN
 CURRENT DEVELOPERS ARE ROBERT BAUER, ICON DEVELOPMENT SOLUTIONS,
 AND ALISON BOECKMANN. IMPLEMENTATION, EFFICIENCY, AND STANDARDIZATION
 PERFORMED BY NOUS INFOSYSTEMS.
 PROBLEM NO.:         1
 1001 phase1 1CMT
 TOT. NO. OF OBS RECS:      260
 TOT. NO. OF INDIVIDUALS:     20
 ONE COMPARTMENT MODEL WITH FIRST-ORDER ABSORPTION (ADVAN2)
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 #METH: First Order Conditional Estimation with Interaction
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 Elapsed estimation time in seconds:     1.31

 #TERM:
0MINIMIZATION SUCCESSFUL
 NO. OF FUNCTION EVALUATIONS USED:      245
 NO. OF SIG. DIGITS IN FINAL EST.:  4.0
0PARAMETER ESTIMATE IS NEAR ITS BOUNDARY
 THIS MUST BE ADDRESSED BEFORE THE COVARIANCE STEP CAN BE IMPLEMENTED

 ETABAR IS THE ARITHMETIC MEAN OF THE ETA-ESTIMATES,
 AND THE P-VALUE IS GIVEN FOR THE NULL HYPOTHESIS THAT THE TRUE MEAN IS 0.

 ETABAR:        -1.1365E-03 -4.1836E-03 -1.6531E-03
 SE:             4.0647E-02  3.0615E-02  2.9191E-02

 P VAL.:         9.7769E-01  8.9131E-01  9.5484E-01

 ETAshrink(%):   1.7156E+01  1.9168E+01  3.6716E+01
 EPSshrink(%):   2.5719E+01  2.5719E+01


 #TERE:

 ********************               FIRST ORDER CONDITIONAL ESTIMATION WITH INTERACTION              ********************
 #OBJT:**************                       MINIMUM VALUE OF OBJECTIVE FUNCTION                      ********************
 #OBJV:********************************************    -2228.423       **************************************************

 ********************               FIRST ORDER CONDITIONAL ESTIMATION WITH INTERACTION              ********************
 ********************                             FINAL PARAMETER ESTIMATE                           ********************

 THETA - VECTOR OF FIXED EFFECTS PARAMETERS   *********
         TH 1      TH 2      TH 3
         1.29E+01  1.88E+02  9.25E-01

 OMEGA - COV MATRIX FOR RANDOM EFFECTS - ETAS  ********
            ETA1      ETA2      ETA3
 ETA1
+        5.07E-02
 ETA2
+        0.00E+00  3.02E-02
 ETA3
+        0.00E+00  0.00E+00  4.48E-02

 SIGMA - COV MATRIX FOR RANDOM EFFECTS - EPSILONS  ****
            EPS1      EPS2
 EPS1
+        3.76E-02
 EPS2
+        0.00E+00  1.00E-05
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<attribution>Altered on installation by NMQual (copyright metruminstitute.org)</attribution>
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