/Users/timb/project/metrum-mifuns/inst/mi210/script/../nonmem/1005.lock/1005.lst
2010.03.03.2059.10
$PROB 1005 phase1 2 CMT like 1004 but diff. initial on V3
$INPUT C ID TIME SEQ=DROP EVID AMT DV
$DATA ../../data/derived/phase1.csv IGNORE=C
$SUBROUTINE ADVAN4 TRANS4
$PK
 CL=THETA(1)*EXP(ETA(1))
 V2 =THETA(2)*EXP(ETA(2))
 KA=THETA(3)*EXP(ETA(3))
 Q  =THETA(4);*EXP(ETA(4))
 V3=THETA(5); *EXP(ETA(5))
 S2=V2

$ERROR
 Y=F*EXP(ERR(1)); + ERR(2)
 IPRE=F

$THETA
(0,10,50)     ;CL
(0,10,100)      ;V
(0,0.2, 5)     ;KA
(0,10,50)      ;Q
(0,100,1000)      ;V3

$OMEGA 0.09 0.09 0.09 ;0.09 0.09
$SIGMA 0.09 ;0.1
$ESTIMATION MAXEVAL=9999 PRINT=5 NOABORT METHOD=1 INTER MSFO=./1005.msf
$COV PRINT=E
$TABLE NOPRINT FILE=./1005.tab ONEHEADER ID AMT TIME EVID PRED IPRE CWRES
$TABLE NOPRINT FILE=./1005par.tab ONEHEADER ID TIME CL Q V2 V3 KA ETA1 ETA2 ETA3

1NONLINEAR MIXED EFFECTS MODEL PROGRAM (NONMEM) VERSION 7.1.0
 ORIGINALLY DEVELOPED BY STUART BEAL, LEWIS SHEINER, AND ALISON BOECKMANN
 CURRENT DEVELOPERS ARE ROBERT BAUER, ICON DEVELOPMENT SOLUTIONS,
 AND ALISON BOECKMANN. IMPLEMENTATION, EFFICIENCY, AND STANDARDIZATION
 PERFORMED BY NOUS INFOSYSTEMS.
 PROBLEM NO.:         1
 1005 phase1 2 CMT like 1004 but diff. initial on V3
 TOT. NO. OF OBS RECS:      260
 TOT. NO. OF INDIVIDUALS:     20
 TWO COMPARTMENT MODEL WITH FIRST-ORDER ABSORPTION (ADVAN4)
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 #METH: First Order Conditional Estimation with Interaction
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 Elapsed estimation time in seconds:     1.85

 #TERM:
0MINIMIZATION SUCCESSFUL
 NO. OF FUNCTION EVALUATIONS USED:      247
 NO. OF SIG. DIGITS IN FINAL EST.:  3.1

 ETABAR IS THE ARITHMETIC MEAN OF THE ETA-ESTIMATES,
 AND THE P-VALUE IS GIVEN FOR THE NULL HYPOTHESIS THAT THE TRUE MEAN IS 0.

 ETABAR:         7.3987E-04 -1.2716E-04 -6.3222E-04
 SE:             4.8964E-02  3.3247E-02  3.7563E-02

 P VAL.:         9.8794E-01  9.9695E-01  9.8657E-01

 ETAshrink(%):   3.7763E-01  2.4873E+01  6.5472E+00
 EPSshrink(%):   8.5364E+00


 #TERE:
 Elapsed covariance time in seconds:     2.00

 ********************               FIRST ORDER CONDITIONAL ESTIMATION WITH INTERACTION              ********************
 #OBJT:**************                       MINIMUM VALUE OF OBJECTIVE FUNCTION                      ********************
 #OBJV:********************************************    -2522.257       **************************************************

 ********************               FIRST ORDER CONDITIONAL ESTIMATION WITH INTERACTION              ********************
 ********************                             FINAL PARAMETER ESTIMATE                           ********************

 THETA - VECTOR OF FIXED EFFECTS PARAMETERS   *********
         TH 1      TH 2      TH 3      TH 4      TH 5
         1.28E+01  1.80E+01  9.12E-02  3.85E+00  6.32E+01

 OMEGA - COV MATRIX FOR RANDOM EFFECTS - ETAS  ********
            ETA1      ETA2      ETA3
 ETA1
+        5.09E-02
 ETA2
+        0.00E+00  4.12E-02
 ETA3
+        0.00E+00  0.00E+00  3.40E-02

 SIGMA - COV MATRIX FOR RANDOM EFFECTS - EPSILONS  ****
            EPS1
 EPS1
+        3.85E-02

 ********************               FIRST ORDER CONDITIONAL ESTIMATION WITH INTERACTION              ********************
 ********************                            STANDARD ERROR OF ESTIMATE                          ********************

 THETA - VECTOR OF FIXED EFFECTS PARAMETERS   *********
         TH 1      TH 2      TH 3      TH 4      TH 5
         6.45E-01  2.48E+00  1.15E-02  1.55E+00  1.23E+01

 OMEGA - COV MATRIX FOR RANDOM EFFECTS - ETAS  ********
            ETA1      ETA2      ETA3
 ETA1
+        1.30E-02
 ETA2
+       .........  2.07E-02
 ETA3
+       ......... .........  1.29E-02

 SIGMA - COV MATRIX FOR RANDOM EFFECTS - EPSILONS  ****
            EPS1
 EPS1
+        2.57E-03

 ********************               FIRST ORDER CONDITIONAL ESTIMATION WITH INTERACTION              ********************
 ********************                          COVARIANCE MATRIX OF ESTIMATE                         ********************

            TH 1      TH 2      TH 3      TH 4      TH 5      OM11      OM12      OM13      OM22      OM23      OM33      SG11
 TH 1
+        4.15E-01
 TH 2
+       -6.88E-01  6.16E+00
 TH 3
+       -2.38E-03  2.47E-02  1.33E-04
 TH 4
+       -3.32E-01  3.29E+00  1.65E-02  2.41E+00
 TH 5
+       -2.85E+00  2.73E+01  1.32E-01  1.84E+01  1.52E+02
 OM11
+       -1.79E-03 -1.24E-03 -3.12E-05 -2.84E-03 -1.92E-02  1.69E-04
 OM12
+       ......... ......... ......... ......... ......... ......... .........
 OM13
+       ......... ......... ......... ......... ......... ......... ......... .........
 OM22
+       -2.08E-03  2.81E-03 -1.71E-05 -2.45E-03 -1.95E-02  1.47E-04 ......... .........  4.27E-04
 OM23
+       ......... ......... ......... ......... ......... ......... ......... ......... ......... .........
 OM33
+       -2.28E-03  7.01E-03  2.17E-05  6.16E-03  4.84E-02  5.07E-05 ......... ......... -8.32E-05 .........  1.67E-04
 SG11
+       -1.39E-04  2.98E-03  1.76E-05  2.01E-03  1.88E-02 -8.58E-06 ......... ......... -1.38E-05 .........  8.47E-06  6.59E-06

 ********************               FIRST ORDER CONDITIONAL ESTIMATION WITH INTERACTION              ********************
 ********************                          CORRELATION MATRIX OF ESTIMATE                        ********************

            TH 1      TH 2      TH 3      TH 4      TH 5      OM11      OM12      OM13      OM22      OM23      OM33      SG11
 TH 1
+        1.00E+00
 TH 2
+       -4.30E-01  1.00E+00
 TH 3
+       -3.20E-01  8.64E-01  1.00E+00
 TH 4
+       -3.32E-01  8.54E-01  9.21E-01  1.00E+00
 TH 5
+       -3.58E-01  8.92E-01  9.29E-01  9.61E-01  1.00E+00
 OM11
+       -2.14E-01 -3.85E-02 -2.09E-01 -1.41E-01 -1.20E-01  1.00E+00
 OM12
+       ......... ......... ......... ......... ......... ......... .........
 OM13
+       ......... ......... ......... ......... ......... ......... ......... .........
 OM22
+       -1.56E-01  5.48E-02 -7.20E-02 -7.62E-02 -7.63E-02  5.48E-01 ......... .........  1.00E+00
 OM23
+       ......... ......... ......... ......... ......... ......... ......... ......... ......... .........
 OM33
+       -2.73E-01  2.18E-01  1.45E-01  3.07E-01  3.03E-01  3.01E-01 ......... ......... -3.11E-01 .........  1.00E+00
 SG11
+       -8.40E-02  4.67E-01  5.95E-01  5.03E-01  5.95E-01 -2.57E-01 ......... ......... -2.61E-01 .........  2.55E-01  1.00E+00
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
 ********************               FIRST ORDER CONDITIONAL ESTIMATION WITH INTERACTION              ********************
 ********************                      EIGENVALUES OF COR MATRIX OF ESTIMATE                     ********************

             1         2         3         4         5         6         7         8         9
         2.52E-02  5.97E-02  1.40E-01  1.86E-01  5.11E-01  7.04E-01  1.23E+00  1.77E+00  4.38E+00
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<attribution>Altered on installation by NMQual (copyright metruminstitute.org)</attribution>
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