/Users/timb/project/metrum-mifuns/inst/test/nm6/script/../out/2/2.lst
2010.01.19.2115.46
$PROB RUN# 2 Parent-Metabolite-Urine Model
$DATA ../../data/2.csv IGNORE=C
$INPUT C ID TIME AMT DV CRCL SEX WT AGE CMT EVID
$SUB ADVAN5 TRANS1 INFN=../../infn/MIfunsRunlogNM6.for
$ABB COMRES=12
$MODEL
    NCOMPARTMENTS=4
    COMP=(GUT,DEFDOSE)    ;GUT COMPARTMENT
    COMP=(CZX)            ;CENTRAL COMPARTMENT FOR CZX
    COMP=(HCZX)           ;CENTRAL COMPARTMENT FOR HCZX
    COMP=(URINE)          ;HCZX URINE
$PK
    K12=THETA(1)*EXP(ETA(1))

    TCLM=THETA(2)*(WT/70)**THETA(7)
    CLCM=TCLM*EXP(ETA(2))        ;CYP2E1 CL CZX
    TCLB=THETA(3)*(WT/70)**THETA(8)
    CLCB=TCLB*EXP(ETA(6))        ;BILIARY & OTHER CL CZX

    CLC=CLCB+CLCM                ;TOTAL CLEARANCE CZX
    FM=CLCM/CLC                  ;FRACTION METABOLIZED

    TCLH=THETA(4)*(CRCL/55)**THETA(9)
    CLHC=TCLH*EXP(ETA(3))    ;TOTAL CLEARANCE OF HCZX
    TVV2=THETA(5)
    V2=TVV2*EXP(ETA(4))

    TVV3=THETA(6)
    V3= TVV3*EXP(ETA(5))
    K23=CLCM/V2
    K20=CLCB/V2
    K34=CLHC/V3
    S2=V2
    S3=V3
    S4=1
$ERROR
    C2=A(2)/V2
    C3=A(3)/V3
    C4=A(4)
    IPRED=F
    IND2=0
    IND3=0
    IND4=0
    IF (CMT.EQ.2) IND2=1
    IF (CMT.EQ.3) IND3=1
    IF (CMT.EQ.4) IND4=1
    Y3=F*(1+ERR(3))+ERR(4)
    Y2=F*(1+ERR(1))+ERR(2)
    Y4=F*(1+ERR(5))+ERR(6)
    Y=Y3*IND3+Y2*IND2+Y4*IND4
"  LAST
"  COM(1)=G(1,1)
"  COM(2)=G(2,1)
"  COM(3)=G(3,1)
"  COM(4)=G(4,1)
"  COM(5)=G(5,1)
"  COM(6)=G(6,1)
"  COM(7)=HH(1,1)
"  COM(8)=HH(2,1)
"  COM(9)=HH(3,1)
"  COM(10)=HH(4,1)
"  COM(11)=HH(5,1)
"  COM(12)=HH(6,1)
$THETA
    (0, 0.493)  ;1. ABSORPTION RATE CONSTANT
    (0, 12.8)   ;2. CLCM
    (0, 5.7)    ;3. CLCB
    (0, 18.4)   ;4. CLHC
    (0, 7.3)    ;5. V2
    (0, 17)     ;6. V3
    (0,0.560)     ;7. WT ON CLCM
    (0,1.30)     ;8. WT ON CLCB
    (0,2.16)     ;9. CRCL ON CLH

$OMEGA
0.009
0.0219
0.034
0.0267
0.0184
0.0742
$SIGMA
   0.071
   100
   0.0452
   0.142
   0.06
   10
$ESTIMATION PRINT=2 MAX=9999 SIG=3 METH=0 POSTHOC NOABORT MSFO=./2.msf
$COVARIANCE PRINT=E
$TABLE ID TIME EVID IPRED NOPRINT ONEHEADER FILE=./2.tab
$TABLE ID CLCM CLCB CLHC V2 V3 EVID ETA1 ETA2 ETA3 ETA4 ETA5 ETA6
NOPRINT ONEHEADER FILE=./2par.tab
$TABLE ID TIME
COM(1)=G11 COM(2)=G21 COM(3)=G31
COM(4)=G41 COM(5)=G51 COM(6)=G61
COM(7)=H11 COM(8)=H21 COM(9)=H31
COM(10)=H41 COM(11)=H51 COM(12)=H61
IPRED MDV NOPRINT ONEHEADER FILE=./cwtab1.deriv

1NONLINEAR MIXED EFFECTS MODEL PROGRAM (NONMEM)    DOUBLE PRECISION NONMEM    VERSION VI LEVEL 2.0
 DEVELOPED AND PROGRAMMED BY STUART BEAL AND LEWIS SHEINER
 PROBLEM NO.:         1
 RUN# 2 Parent-Metabolite-Urine Model
 TOT. NO. OF OBS RECS:      303
 TOT. NO. OF INDIVIDUALS:     21
 GENERAL LINEAR KINETICS MODEL (ADVAN5)
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
0MINIMIZATION SUCCESSFUL
 NO. OF FUNCTION EVALUATIONS USED:      745
 NO. OF SIG. DIGITS IN FINAL EST.:  3.2

 ********************                           MINIMUM VALUE OF OBJECTIVE FUNCTION                  ********************

 **************************************************       4425.313     **************************************************

 ********************                                  FINAL PARAMETER ESTIMATE                      ********************

 THETA - VECTOR OF FIXED EFFECTS PARAMETERS   *********
            TH 1      TH 2      TH 3      TH 4      TH 5      TH 6      TH 7      TH 8      TH 9
         4.93E-01  1.29E+01  5.75E+00  1.84E+01  7.34E+00  1.77E+01  5.91E-01  1.32E+00  2.15E+00

 OMEGA - COV MATRIX FOR RANDOM EFFECTS - ETAS  ********
            ETA1      ETA2      ETA3      ETA4      ETA5      ETA6
 ETA1
+        9.48E-03
 ETA2
+        0.00E+00  2.19E-02
 ETA3
+        0.00E+00  0.00E+00  3.44E-02
 ETA4
+        0.00E+00  0.00E+00  0.00E+00  2.67E-02
 ETA5
+        0.00E+00  0.00E+00  0.00E+00  0.00E+00  1.84E-02
 ETA6
+        0.00E+00  0.00E+00  0.00E+00  0.00E+00  0.00E+00  7.42E-02

 SIGMA - COV MATRIX FOR RANDOM EFFECTS - EPSILONS  ****
            EPS1      EPS2      EPS3      EPS4      EPS5      EPS6
 EPS1
+        7.14E-02
 EPS2
+        0.00E+00  1.58E+04
 EPS3
+        0.00E+00  0.00E+00  4.52E-02
 EPS4
+        0.00E+00  0.00E+00  0.00E+00  1.42E-01
 EPS5
+        0.00E+00  0.00E+00  0.00E+00  0.00E+00  6.01E-02
 EPS6
+        0.00E+00  0.00E+00  0.00E+00  0.00E+00  0.00E+00  1.18E+01

 ********************                             STANDARD ERROR OF ESTIMATE                         ********************

 THETA - VECTOR OF FIXED EFFECTS PARAMETERS   *********
            TH 1      TH 2      TH 3      TH 4      TH 5      TH 6      TH 7      TH 8      TH 9
         1.23E-02  9.46E-01  7.80E-01  1.33E+00  6.02E-01  1.12E+00  3.02E-01  5.13E-01  1.49E-01

 OMEGA - COV MATRIX FOR RANDOM EFFECTS - ETAS  ********
            ETA1      ETA2      ETA3      ETA4      ETA5      ETA6
 ETA1
+        6.41E-03
 ETA2
+       .........  1.51E-02
 ETA3
+       ......... .........  2.56E-02
 ETA4
+       ......... ......... .........  3.84E-02
 ETA5
+       ......... ......... ......... .........  1.23E-02
 ETA6
+       ......... ......... ......... ......... .........  3.96E-02

 SIGMA - COV MATRIX FOR RANDOM EFFECTS - EPSILONS  ****
            EPS1      EPS2      EPS3      EPS4      EPS5      EPS6
 EPS1
+        1.16E-02
 EPS2
+       .........  1.10E+04
 EPS3
+       ......... .........  6.04E-03
 EPS4
+       ......... ......... .........  6.32E-02
 EPS5
+       ......... ......... ......... .........  1.90E-02
 EPS6
+       ......... ......... ......... ......... .........  7.86E+00
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
 ********************                  EIGENVALUES OF COR MATRIX OF ESTIMATE                         ********************

             1         2         3         4         5         6         7         8         9        10        11        12
             13        14        15        16        17        18        19        20        21
        -1.04E-10  7.90E-04  2.02E-03  1.93E-02  4.79E-02  8.19E-02  1.78E-01  2.24E-01  3.29E-01  3.91E-01  4.81E-01  5.80E-01
          8.61E-01  9.69E-01  1.52E+00  1.63E+00  2.11E+00  2.30E+00  2.40E+00  3.12E+00  3.76E+00
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C     Altered on installation by NMQual (copyright metruminstitute.org): 2009.11.19.0831
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<attribution>Altered on installation by NMQual (copyright metruminstitute.org)</attribution>
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